# This script was written with ElasticMD.
# This script will strain the system in the xz-direction at a strain rate of 200000000.0 until an engineering strain of 0.2214028 is achieved. Simulation will run at 300 K and 1.0 atm in the non-straining directions.

#################################
### Initialization & Settings ###
#################################

# Debugging
echo both

units 		real
dimension	3
boundary	p p p

variable myid string PA6_10052023_IFFREq_180S1_Sh2
variable data string PA6_10052023_IFFREq_180S1.dat.gz
log ${myid}.log.lammps
timestep 1 # 1 fs
variable strain equal 0.2214028
variable strain_rate_s equal 200000000.0
variable dir equal 2
# dir 1 means xy
# dir 2 means xz
# dir 3 means yz
##############################
### Force Field Parameters ###
##############################
atom_style	full
bond_style hybrid class2 morse
angle_style class2
dihedral_style class2
improper_style class2
special_bonds lj/coul 0 0 1
pair_style lj/class2/coul/long 10.0
pair_modify mix sixthpower
kspace_style pppm 1e-6
read_data       ${data}
change_box all triclinic remap
kspace_style pppm 1e-6 # You MUST redefine kspace after changing the box to triclinic

# Include IFF-R bond coefficients for PA6 example
include PA6_IFFR.coeff

variable        strain_rate_fs equal ${strain_rate_s}*1e-15 # in 1/fs
variable        totaltime equal ${strain}/${strain_rate_fs} # total time in femtoseconds
variable        steps equal $(round(v_totaltime/dt))
variable        quarter_steps equal $(floor(v_steps/4))
variable        eeng equal time*${strain_rate_fs}
variable        etrue equal ln(1+v_eeng)

variable thermo_freq equal $(round(v_steps/2000))
variable dump_freq equal $(round(v_steps/30))

##############################
########### Strains ##########
##############################
#cellgamma, cellbeta, and cellalpha refer to the crystallographic angles

variable	eengxy equal (PI/180*(90-cellgamma))
variable	eengxz equal (PI/180*(90-cellbeta))
variable	eengyz equal (PI/180*(90-cellalpha))
variable    etruexy equal ln(1+v_eengxy)
variable    etruexz equal ln(1+v_eengxz)
variable    etrueyz equal ln(1+v_eengyz)


##############################
########## Stresses ##########
##############################

compute         p all pressure thermo_temp
variable        sxx equal -0.101325*c_p[1] #in MPa
variable        syy equal -0.101325*c_p[2] #in MPa
variable        szz equal -0.101325*c_p[3] #in MPa
variable        sxy equal -0.101325*c_p[4] #in MPa
variable        sxz equal -0.101325*c_p[5] #in MPa
variable        syz equal -0.101325*c_p[6] #in MPa
fix             sxx_ave all ave/time 1 ${thermo_freq} ${thermo_freq} v_sxx
fix             syy_ave all ave/time 1 ${thermo_freq} ${thermo_freq} v_syy
fix             szz_ave all ave/time 1 ${thermo_freq} ${thermo_freq} v_szz
fix             sxy_ave all ave/time 1 ${thermo_freq} ${thermo_freq} v_sxy
fix             sxz_ave all ave/time 1 ${thermo_freq} ${thermo_freq} v_sxz
fix             syz_ave all ave/time 1 ${thermo_freq} ${thermo_freq} v_syz

##############################
### Thermo & Dump Settings ###
##############################

thermo ${thermo_freq}
thermo_style custom step temp press etotal ke pe epair ebond eangle edihed eimp elong lx ly lz vol density v_eengxy v_eengxz v_eengyz v_etruexy v_etruexz v_etrueyz v_sxx v_syy v_szz v_sxy v_sxz v_syz f_sxx_ave f_syy_ave f_szz_ave f_sxy_ave f_sxz_ave f_syz_ave v_dir
dump 1 all custom/gz ${dump_freq} ${myid}.lammpstrj.gz x y z type id

####################
### Run Settings ###
####################
neigh_modify    delay 0 every 1 check yes one 2500 page 100000
if "${dir} == 1" then &
  "fix          1 all npt temp 300 300 100 xz 1 1 1000 yz 1 1 1000 x 1 1 1000 y 1 1 1000 z 1 1 1000" &
  "fix          2 all deform 1 xy erate ${strain_rate_fs} flip no"
if  "${dir} == 2" then &
  "fix          1 all npt temp 300 300 100 xy 1 1 1000 yz 1 1 1000 x 1 1 1000 y 1 1 1000 z 1 1 1000" &
  "fix          2 all deform 1 xz erate ${strain_rate_fs} flip no"
if "${dir} == 3" then &
  "fix          1 all npt temp 300 300 100 xy 1 1 1000 xz 1 1 1000 x 1 1 1000 y 1 1 1000 z 1 1 1000" &
  "fix          2 all deform 1 yz erate ${strain_rate_fs} flip no"
# Breaking up the runs resets the pppm grid points which increases accuracy when box size changes
# Please note that the start and stop keywords are necessary so that the fix deform command deforms the box correctly over several runs
run		${quarter_steps} start 0 stop $(v_quarter_steps*4)
run		${quarter_steps} start 0 stop $(v_quarter_steps*4)
run		${quarter_steps} start 0 stop $(v_quarter_steps*4)
run		${quarter_steps} start 0 stop $(v_quarter_steps*4)
write_data ${myid}.dat
